**
** Heading +++++++++++++++++++++++++++++++++++++++++++++++++
**
*Heading
Hash: 50rThEvW, Date: 12/12/2021, Unit system: MM_TON_S_C
**
** Nodes +++++++++++++++++++++++++++++++++++++++++++++++++++
**
*Node
11261, 4.23520299E+000, 3.47826316E+001, 1.83675171E+001
11227, 2.96929267E+001, 5.99074854E+000, 1.05952755E+001
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**
** Elements ++++++++++++++++++++++++++++++++++++++++++++++++
**
*Element, Type=C3D4, Elset=Solid_part-46
1, 6865, 7004, 7132, 6911
2, 6907, 1735, 1680, 1679
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*Element, Type=C3D4, Elset=Solid_part-47
4080, 2182, 2240, 2163, 2164
4081, 2267, 275, 287, 2266
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*Element, Type=C3D4, Elset=Solid_part-48
5099, 2425, 2419, 2388, 2426
5100, 2389, 2403, 320, 2390
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*Element, Type=C3D4, Elset=Solid_part-49
5559, 2529, 2491, 414, 413
5560, 2509, 2492, 2511, 2528
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*Element, Type=C3D4, Elset=Solid_part-50
5812, 268, 7164, 7150, 7198
5832, 7164, 7157, 7150, 7210
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*Element, Type=C3D4, Elset=Solid_part-51
5513, 7258, 7254, 7281, 2723
5522, 7258, 7282, 7277, 7259
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*Element, Type=C3D4, Elset=Solid_part-52
561, 8221, 9165, 9670, 4353
1065, 8221, 9670, 9165, 9153
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*Element, Type=C3D4, Elset=Solid_part-53
23, 10644, 10639, 10310, 6301
24, 9844, 11456, 10169, 1193
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*Element, Type=C3D4, Elset=Solid_part-54
23720, 3906, 6613, 902, 1434
23727, 911, 1443, 1424, 3954
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*Element, Type=C3D4, Elset=Solid_part-55
19501, 5684, 5683, 278, 6674
19513, 1002, 1003, 245, 300
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*Element, Type=C3D4, Elset=Solid_part-56
4902, 5387, 6691, 1134, 83
4910, 5404, 1134, 6691, 6690
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*Element, Type=C3D4, Elset=Solid_part-57
33, 6790, 2706, 2720, 6770
39, 6815, 492, 40, 2628
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**
** Node sets +++++++++++++++++++++++++++++++++++++++++++++++
**
*Nset, Nset=Internal-1_Internal_Selection-1_Pre-tension-1
2, 4, 168, 169, 170, 171
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*Nset, Nset=Internal-3_Internal_Selection-3_Pre-tension-2
1, 3, 133, 134, 135, 136
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*Nset, Nset=Internal-2_Internal_Selection-2_Pressure-2
13, 14, 15, 16, 21, 23
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*Nset, Nset=Internal_Selection-1_ZeroDisplacementinX
14, 15, 19, 20, 33, 34
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*Nset, Nset=Internal_Selection-2_ZeroDispacementY
21, 22, 23, 24, 27, 28
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*Nset, Nset=Internal_Selection-3_ZeroDisplacementZDirection
13, 14, 17, 19, 21, 22
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**
** Element sets ++++++++++++++++++++++++++++++++++++++++++++
**
*Elset, Elset=Internal-1_Internal_Selection-1_Pre-tension-1_S3
14, 191, 761, 876, 1179, 1358, 1362, 1483, 1796, 1919, 2208, 2560, 3206, 3216, 3538, 3709
*Elset, Elset=Internal-2_Internal_Selection-1_Pre-tension-1_S2
50, 1526, 1534, 1920, 1961, 3043, 3152, 3706, 3718
*Elset, Elset=Internal-3_Internal_Selection-1_Pre-tension-1_S1
141, 148, 273, 289, 314, 784
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*Elset, Elset=Internal-4_Internal_Selection-1_Pre-tension-1_S4
297, 430, 572, 2297, 2556, 2621, 3041, 3156, 3343, 3355, 3357, 3386, 3536, 4058
*Elset, Elset=Internal-9_Internal_Selection-3_Pre-tension-2_S2
46, 96, 250, 423, 497, 781
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*Elset, Elset=Internal-10_Internal_Selection-3_Pre-tension-2_S3
98, 479, 500, 774, 1030, 1203, 1516, 1519, 1751, 1927, 2220, 2695, 3660, 3683
*Elset, Elset=Internal-11_Internal_Selection-3_Pre-tension-2_S4
475, 523, 621, 1083, 1101, 1427
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*Elset, Elset=Internal-12_Internal_Selection-3_Pre-tension-2_S1
777, 1172, 1508, 1518, 1618, 2210, 2259, 2986, 3297, 3854
*Elset, Elset=Internal-5_Internal_Selection-2_Pressure-2_S3
795, 4902, 4910, 4912, 5121, 5123
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*Elset, Elset=Internal-6_Internal_Selection-2_Pressure-2_S1
976, 4990, 5134, 5147, 5160, 5181
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*Elset, Elset=Internal-7_Internal_Selection-2_Pressure-2_S2
1021, 1164, 2740, 5013, 5107, 5151
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*Elset, Elset=Internal-8_Internal_Selection-2_Pressure-2_S4
1025, 2369, 5100, 5119, 5125, 5135
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*Elset, Elset=Internal-13_Surface-1_S4
7200, 7207, 7299, 7301, 7354, 7398, 7434, 7439, 7449, 7484, 7657, 7658, 7787, 7990, 7996, 8160
*Elset, Elset=Internal-14_Surface-1_S2
7244, 7261, 7450, 7507, 7818, 7936, 8079, 8300, 8328
*Elset, Elset=Internal-15_Surface-1_S3
7297, 7389, 7506, 7531, 7609, 7771, 7834, 7858, 7932, 7941, 8145, 8150, 8161, 8337, 8354
*Elset, Elset=Internal-16_Surface-1_S1
7360, 7366, 7410, 7465, 7514, 7767
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*Elset, Elset=Internal-17_Surface-2_S3
6039, 6051, 6082, 6139, 6192, 6281
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*Elset, Elset=Internal-18_Surface-2_S1
6080, 6178, 6322, 6368, 6420, 6504, 6559, 6560, 6563, 6772, 6907, 6937, 6966
*Elset, Elset=Internal-19_Surface-2_S4
6090, 6112, 6132, 6140, 6233, 6416, 6500, 6511, 6570, 6747, 6793, 6896, 6952, 7139
*Elset, Elset=Internal-20_Surface-2_S2
6134, 6229, 6279, 6413, 6417, 6422
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*Elset, Elset=Internal-21_Surface-3_S3
14, 191, 761, 876, 1179, 1358, 1362, 1483, 1796, 1919, 2208, 2560, 3206, 3216, 3538, 3709
*Elset, Elset=Internal-22_Surface-3_S2
50, 1526, 1534, 1920, 1961, 3043, 3152, 3706, 3718
*Elset, Elset=Internal-23_Surface-3_S1
141, 148, 273, 289, 314, 784
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*Elset, Elset=Internal-24_Surface-3_S4
297, 430, 572, 2297, 2556, 2621, 3041, 3156, 3343, 3355, 3357, 3386, 3536, 4058
*Elset, Elset=Internal-25_Surface-4_S2
46, 96, 250, 423, 497, 781
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*Elset, Elset=Internal-26_Surface-4_S3
98, 479, 500, 774, 1030, 1203, 1516, 1519, 1751, 1927, 2220, 2695, 3660, 3683
*Elset, Elset=Internal-27_Surface-4_S4
475, 523, 621, 1083, 1101, 1427
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*Elset, Elset=Internal-28_Surface-4_S1
777, 1172, 1508, 1518, 1618, 2210, 2259, 2986, 3297, 3854
**
** Surfaces ++++++++++++++++++++++++++++++++++++++++++++++++
**
*Surface, Name=Internal_Selection-1_Pre-tension-1, Type=Element
Internal-1_Internal_Selection-1_Pre-tension-1_S3, S3
Internal-2_Internal_Selection-1_Pre-tension-1_S2, S2
Internal-3_Internal_Selection-1_Pre-tension-1_S1, S1
Internal-4_Internal_Selection-1_Pre-tension-1_S4, S4
*Surface, Name=Internal_Selection-3_Pre-tension-2, Type=Element
Internal-9_Internal_Selection-3_Pre-tension-2_S2, S2
Internal-10_Internal_Selection-3_Pre-tension-2_S3, S3
Internal-11_Internal_Selection-3_Pre-tension-2_S4, S4
Internal-12_Internal_Selection-3_Pre-tension-2_S1, S1
*Surface, Name=Internal_Selection-2_Pressure-2, Type=Element
Internal-5_Internal_Selection-2_Pressure-2_S3, S3
Internal-6_Internal_Selection-2_Pressure-2_S1, S1
Internal-7_Internal_Selection-2_Pressure-2_S2, S2
Internal-8_Internal_Selection-2_Pressure-2_S4, S4
*Surface, Name=Surface-1, Type=Element
Internal-13_Surface-1_S4, S4
Internal-14_Surface-1_S2, S2
Internal-15_Surface-1_S3, S3
Internal-16_Surface-1_S1, S1
*Surface, Name=Surface-2, Type=Element
Internal-17_Surface-2_S3, S3
Internal-18_Surface-2_S1, S1
Internal-19_Surface-2_S4, S4
Internal-20_Surface-2_S2, S2
*Surface, Name=Surface-3, Type=Element
Internal-21_Surface-3_S3, S3
Internal-22_Surface-3_S2, S2
Internal-23_Surface-3_S1, S1
Internal-24_Surface-3_S4, S4
*Surface, Name=Surface-4, Type=Element
Internal-25_Surface-4_S2, S2
Internal-26_Surface-4_S3, S3
Internal-27_Surface-4_S4, S4
Internal-28_Surface-4_S1, S1
**
** Physical constants ++++++++++++++++++++++++++++++++++++++
**
**
** Materials +++++++++++++++++++++++++++++++++++++++++++++++
**
*Material, Name=S185
*Density
7.87E-09
*Elastic
200000, 0.3
*Expansion, Zero=20
1.1E-05
*Conductivity
14
*Specific heat
440000000
**
** Sections ++++++++++++++++++++++++++++++++++++++++++++++++
**
*Solid section, Elset=Solid_part-46, Material=S185
*Solid section, Elset=Solid_part-47, Material=S185
*Solid section, Elset=Solid_part-48, Material=S185
*Solid section, Elset=Solid_part-49, Material=S185
*Solid section, Elset=Solid_part-50, Material=S185
*Solid section, Elset=Solid_part-51, Material=S185
*Solid section, Elset=Solid_part-52, Material=S185
*Solid section, Elset=Solid_part-53, Material=S185
*Solid section, Elset=Solid_part-54, Material=S185
*Solid section, Elset=Solid_part-55, Material=S185
*Solid section, Elset=Solid_part-56, Material=S185
*Solid section, Elset=Solid_part-57, Material=S185
**
** Pre-tension sections ++++++++++++++++++++++++++++++++++++
**
*Pre-tension section, Surface=Internal_Selection-1_Pre-tension-1, Node=12108
0, 0, -1
*Pre-tension section, Surface=Internal_Selection-3_Pre-tension-2, Node=12109
0, 0, -1
**
** Constraints +++++++++++++++++++++++++++++++++++++++++++++
**
*Tie, Name=Tie-1
Surface-3, Surface-1
*Tie, Name=Tie-2
Surface-4, Surface-2
**
** Surface interactions ++++++++++++++++++++++++++++++++++++
**
**
** Contact pairs +++++++++++++++++++++++++++++++++++++++++++
**
** Name: Contact_pair-1: Deactivated
** Name: Contact_pair-2: Deactivated
**
** Initial conditions ++++++++++++++++++++++++++++++++++++++
**
**
** Steps +++++++++++++++++++++++++++++++++++++++++++++++++++
**
**
** Step-1 ++++++++++++++++++++++++++++++++++++++++++++++++++
**
*Step, Nlgeom, Inc=100
*Static, Solver=Iterative scaling
1, 1, 1E-05, 1
**
** Boundary conditions +++++++++++++++++++++++++++++++++++++
**
*Boundary, op=New
** Name: ZeroDisplacementinX
*Boundary
Internal_Selection-1_ZeroDisplacementinX, 1, 1, 0
** Name: ZeroDispacementY
*Boundary
Internal_Selection-2_ZeroDispacementY, 2, 2, 0
** Name: ZeroDisplacementZDirection
*Boundary
Internal_Selection-3_ZeroDisplacementZDirection, 3, 3, 0
**
** Loads +++++++++++++++++++++++++++++++++++++++++++++++++++
**
*Cload, op=New
*Dload, op=New
** Name: Pre-tension-1
*Cload
12108, 1, 1696.5
** Name: Pressure-2
*Dload
Internal-5_Internal_Selection-2_Pressure-2_S3, P3, 1E-12
Internal-6_Internal_Selection-2_Pressure-2_S1, P1, 1E-12
Internal-7_Internal_Selection-2_Pressure-2_S2, P2, 1E-12
Internal-8_Internal_Selection-2_Pressure-2_S4, P4, 1E-12
** Name: Pre-tension-2
*Cload
12109, 1, -1696.5
**
** Defined fields ++++++++++++++++++++++++++++++++++++++++++
**
**
** History outputs +++++++++++++++++++++++++++++++++++++++++
**
**
** Field outputs +++++++++++++++++++++++++++++++++++++++++++
**
*Node file
RF, U
*El file
S, E
**
** End step ++++++++++++++++++++++++++++++++++++++++++++++++
**
*End step
